# Rough Compressor Dimension Sizing Sheet
Sandia_r2 := 0.0186817 m
Sandia_Thickness := 0.000762 m = 0.000762 m
CU_BCL_r2 := 0.05054 m
CU_BCL_Thickness := Sandia_Thickness/Sandia_r2*CU_BCL_r2 = 0.00206145 m
Sandia_TipClearance := 0.00254
Sandia_b2 := 0.001712036 m
CU_BCL_b2 := Sandia_b2/Sandia_r2*CU_BCL_r2 = 0.00463161 m
ϕ := 0.035
r4 := (1.55 + ϕ)*CU_BCL_r2 = 0.0801059 m
